*Heading
** Job name: Imp_HEX20_2ft Model name: Implicit
** Generated by: Abaqus/CAE 2017
*Preprint, echo=NO, model=NO, history=NO, contact=NO
**
** PARTS
**
*Part, name=Part-1
*Node
      1,          10.,          10.,          20.
      2,          10.,           8.,          20.
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*Element, type=C3D20
 1,  23,  24,  26,  25,   1,   2,   4,   3,  48,  47,  46,  45,  49,  50,  51,
     52,  54,  53,  55,  56
 2,  25,  26,  28,  27,   3,   4,   6,   5,  46,  59,  58,  57,  51,  60,  61,
     62,  56,  55,  63,  64
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*Nset, nset=Set-1, generate
   1,  128,    1
*Elset, elset=Set-1, generate
  1,  10,   1
** Section: Section-1
*Solid Section, elset=Set-1, material=Soil
,
*End Part
**
**
** ASSEMBLY
**
*Assembly, name=Assembly
**
*Instance, name=Part-1-1, part=Part-1
         -9.,          -9.,           0.
*End Instance
**
*Elset, elset=Elem_Strs_TM, instance=Part-1-1
 1, 6
*Nset, nset=Fixed, instance=Part-1-1
  21,  22,  43,  44, 122, 125, 127, 128
*Elset, elset=Fixed, instance=Part-1-1
 10,
*Nset, nset=Node_disp_TM, instance=Part-1-1
  1,  2, 23, 24
*Elset, elset=_Pressure_S3, internal, instance=Part-1-1
 1,
*Surface, type=ELEMENT, name=Pressure
_Pressure_S3, S3
*End Assembly
**
** MATERIALS
**
*Material, name=Soil
*Density
 3.67,
*Elastic
 1.19752e+08, 0.3
** ----------------------------------------------------------------
**
** STEP: Implicit
**
*Step, name=Implicit, nlgeom=NO, inc=10000
*Dynamic,direct
1e-05,0.02,
**
** BOUNDARY CONDITIONS
**
** Name: BC-1 Type: Displacement/Rotation
*Boundary
Fixed, 1, 1
Fixed, 2, 2
Fixed, 3, 3
**
** LOADS
**
** Name: Pressure   Type: Pressure
*Dsload
Pressure, P, 1000.
**
** OUTPUT REQUESTS
**
*Restart, write, frequency=0
**
** FIELD OUTPUT: F-Output-1
**
*Output, field, frequency=100
*Node Output
A, U, V
*Element Output, directions=YES
S,
**
** HISTORY OUTPUT: H-Output-1
**
*Output, history, time interval=1e-05, time marks=NO
*Element Output, elset=Elem_Strs_TM
S33,
**
** HISTORY OUTPUT: H-Output-2
**
*Node Output, nset=Node_disp_TM
U1, U2, U3
*End Step
